# OpenSim document version 40000
InverseKinematicsTool S01DE509:
  results_directory: /Volumes/Michael/Balance Metric/Balance Metric Pilot/OpenSim/S01DE5/Marker_data//../IK/S01DE509/output/
  constraint_weight: Inf
  accuracy: 1e-5
  marker_file: /Volumes/Michael/Balance Metric/Balance Metric Pilot/OpenSim/S01DE5/Marker_data/S01DE509.trc
  time_range: 0 20.99
  report_errors: true
  output_motion_file: /Volumes/Michael/Balance Metric/Balance Metric Pilot/OpenSim/S01DE5/Marker_data//../IK/S01DE509/output/results_ik.mot
  report_marker_locations: false
  IKTaskSet:
    IKMarkerTask C7: apply=true weight=1
    IKMarkerTask RSHL: apply=true weight=1
    IKMarkerTask LSHL: apply=true weight=1
    IKMarkerTask CLAV: apply=true weight=1
    IKMarkerTask RASI: apply=true weight=1
    IKMarkerTask LASI: apply=true weight=1
    IKMarkerTask RPSI: apply=true weight=1
    IKMarkerTask LPSI: apply=true weight=1
    IKMarkerTask R_HJC: apply=false weight=1
    IKMarkerTask L_HJC: apply=false weight=1
    IKMarkerTask RTH1: apply=true weight=1
    IKMarkerTask RTH2: apply=true weight=1
    IKMarkerTask RTH3: apply=true weight=1
    IKMarkerTask RLKN: apply=true weight=1
    IKMarkerTask RMKN: apply=true weight=1
    IKMarkerTask RSH1: apply=true weight=1
    IKMarkerTask RSH2: apply=true weight=1
    IKMarkerTask RSH3: apply=true weight=1
    IKMarkerTask RLAK: apply=true weight=1
    IKMarkerTask RMAK: apply=true weight=1
    IKMarkerTask RTOE: apply=true weight=1
    IKMarkerTask RMT5: apply=true weight=1
    IKMarkerTask RCAL: apply=true weight=1
    IKMarkerTask LTH1: apply=true weight=1
    IKMarkerTask LTH2: apply=true weight=1
    IKMarkerTask LTH3: apply=true weight=1
    IKMarkerTask LLKN: apply=true weight=1
    IKMarkerTask LMKN: apply=true weight=1
    IKMarkerTask LLAK: apply=true weight=1
    IKMarkerTask LSH1: apply=true weight=1
    IKMarkerTask LSH2: apply=true weight=1
    IKMarkerTask LSH3: apply=true weight=1
    IKMarkerTask LMAK: apply=true weight=1
    IKMarkerTask LTOE: apply=true weight=1
    IKMarkerTask LCAL: apply=true weight=1
    IKMarkerTask LMT5: apply=true weight=1
    IKMarkerTask midASIS: apply=false weight=1
    IKMarkerTask RMT5_proj: apply=false weight=1
    IKMarkerTask LMT5_proj: apply=false weight=1
    IKMarkerTask RTOE_proj: apply=false weight=1
    IKMarkerTask LTOE_proj: apply=false weight=1
    IKMarkerTask L_AJC: apply=false weight=1
    IKMarkerTask L_AJC_proj: apply=false weight=1
    IKMarkerTask L_KJC: apply=false weight=1
    IKMarkerTask R_AJC: apply=false weight=1
    IKMarkerTask R_AJC_proj: apply=false weight=1
    IKMarkerTask R_KJC: apply=false weight=1
    IKMarkerTask midHJC: apply=false weight=1
    IKMarkerTask midPelvis: apply=false weight=1
    IKMarkerTask midPSIS: apply=false weight=1
    IKMarkerTask LGTC: apply=false weight=1
    IKMarkerTask RGTC: apply=false weight=1
    IKMarkerTask LULN: apply=true weight=1
    IKMarkerTask RULN: apply=true weight=1
    IKMarkerTask LRAD: apply=true weight=1
    IKMarkerTask RRAD: apply=true weight=1
    IKMarkerTask LFA: apply=true weight=1
    IKMarkerTask RFA: apply=true weight=1
    IKMarkerTask LLEL: apply=true weight=1
    IKMarkerTask RLEL: apply=true weight=1
    IKMarkerTask RASH: apply=false weight=1
    IKMarkerTask RPSH: apply=false weight=1
    IKMarkerTask LASH: apply=false weight=1
    IKMarkerTask LPSH: apply=false weight=1
    IKMarkerTask RUA1: apply=true weight=1
    IKMarkerTask RUA2: apply=true weight=1
    IKMarkerTask RUA3: apply=true weight=1
    IKMarkerTask LUA1: apply=true weight=1
    IKMarkerTask LUA2: apply=true weight=1
    IKMarkerTask LUA3: apply=true weight=1
